**
** File generated by the general flowline pre-process v2.00
** Generated by: Wei Qiao
** Generated at: 8/5/2026 12:14:32 PM
** Model name: BPTiber_With_BM_FL6_TestBase
**
**
*INITIAL CONDITIONS, TYPE = TEMPERATURE
*INCLUDE, INPUT = "TEMP_STEEL_landing_Temp.prof"
**
*INITIAL CONDITIONS, TYPE=FIELD, VARIABLE=1
*INCLUDE, INPUT="INIT_COND_FIELD_1.prof"
*INITIAL CONDITIONS, TYPE=FIELD, VARIABLE=2
*INCLUDE, INPUT="INIT_COND_FIELD_2.prof"
*INITIAL CONDITIONS, TYPE=FIELD, VARIABLE=3
PIPE_NODES, 0
**
**=================================================================================
**    STEP 001: Install 1/9 - Setup on springs
**=================================================================================
**
*STEP , NLGEOM = YES, UNSYMM = YES , INC = 1000, NAME = "Step 001 - Install 1/5 - Setup on springs"
Install 1/9 - setup on springs
**
*STATIC, STABILIZE = 1.0e-8
0.05, 1.0, 1.0e-10, 0.1
**
*CONTROLS , RESET
*CONTROLS , ANALYSIS=DISCONTINUOUS
*controls,parameters=time incrementation
4,8,9,7,7,4,6,30,6,3
0.33,0.5,0.75,0.85,0.33,0.33,1.5,0.75
0.8,1.5,1.25,2.0,1.0,0.1,1.0,0.95
**
**---------------------
** Model changes
**---------------------
**
*MODEL CHANGE, ACTIVATE
*MODEL CHANGE, REMOVE, TYPE=ELEMENT
PLETs, STRUCT1_DC3PLET6B,STRUCT2_PLET6A
*MODEL CHANGE, REMOVE, TYPE = CONTACT PAIR
PIPE_SURFACE , INSTALL_SURFACE
*MODEL CHANGE, REMOVE, TYPE = CONTACT PAIR
PIPE_SURFACE , SEABED_SURFACE
*MODEL CHANGE, REMOVE, TYPE = CONTACT PAIR
PL_BUOY_Mids,SEABED_SURFACE
PL_BUOY_Ends,SEABED_SURFACE
**
**---------------------
** Boundary conditions
**---------------------
**
*BOUNDARY, OP = NEW
PLETs,1,6
**
SEABED_REF_NODE, 1, 6
SEABED_NO_FRICTION_REF_NODE, 1, 6
INSTALL_SURFACE_REF_NODE, 1, 6
**
START_NODE, 2, 2
END_NODE, 2, 2
**
nset_gap, 1, 2
nset_gap, 4, 6
nset_gnd, 1, 6
**
**
**---------------------
** Loadings
**---------------------
**
*DLOAD, OP = NEW
*INCLUDE, INPUT = "PRESS_STEEL_INT_Install.prof"
*INCLUDE, INPUT = "PRESS_STEEL_EXT_External-Pressure.prof"
*INCLUDE, INPUT = "WEIGHT_Content_Install.prof"
**INCLUDE, INPUT="Anti-slip_force.prof"
**
*CLOAD , OP = NEW, FOLLOWER
START_NODE,1,-<T_LAY1>
END_NODE , 1 , <T_LAY1>
**
**
*INCLUDE, INPUT = BPTiber_With_BM_FL6_TestBase_10_Outputs_NBINT_2.inp
**
*END STEP
**
**=================================================================================
**    STEP 002: Install 2/9 -  Lower Pipeline above seabed
**=================================================================================
**
*STEP , NLGEOM = YES, UNSYMM = YES , INC = 1000, NAME = "Step 002 - Install 2/5 -  Lower Pipeline above seabed"
Install 2/9 -  Lower Pipeline above seabed
**
*STATIC, STABILIZE = 1.0e-8
0.05, 1.0, 1.0e-10, 0.1
**
**---------------------
** Model changes
**---------------------
**
**
**---------------------
** Boundary conditions
**---------------------
**
*BOUNDARY, OP = NEW
PLETs,1,6
SEABED_REF_NODE, 1, 6
SEABED_NO_FRICTION_REF_NODE, 1, 6
INSTALL_SURFACE_REF_NODE, 1, 6
START_NODE, 2, 2
START_NODE, 4, 4
END_NODE, 1, 2
END_NODE, 4, 4
STEEL_NODES2, 4,4
**
nset_gap, 1, 2
nset_gap, 4, 6
nset_gnd, 1, 2
nset_gnd, 4, 6
**
*BOUNDARY, OP = NEW
*INCLUDE, INPUT=BPTiber_With_BM_FL6_TestBase_05_Initial_1P5m.txt
**
**---------------------
** Loadings
**---------------------
**
*DLOAD, OP = NEW
*INCLUDE, INPUT = "PRESS_STEEL_INT_Install.prof"
*INCLUDE, INPUT = "PRESS_STEEL_EXT_External-Pressure.prof"
*INCLUDE, INPUT = "WEIGHT_Content_Install.prof"
SEC1_STEEL_ELEMENTS, PZ, -<s1_equiv_steel_weight>
*INCLUDE, INPUT="Anti-slip_force.prof"
**
**
*CLOAD , OP = NEW, FOLLOWER
START_NODE,1,-<T_LAY1>
**
**
*INCLUDE, INPUT = BPTiber_With_BM_FL6_TestBase_10_Outputs_NBINT_2.inp
**
*END STEP
**
**=================================================================================
**    STEP 003: Install 3/9 - Lower Pipeline on Seabed
**=================================================================================
**
*STEP , NLGEOM = YES, UNSYMM = YES , INC = 1000, NAME = "Step 003 - Install 3/5 - Lower Pipeline on Seabed"
Install 3/9 - Lower Pipeline on Seabed
**
*STATIC, STABILIZE = 1.0e-8
0.05, 1.0, 1.0e-10, 0.1
**
**---------------------
** Model changes
**---------------------
**
**
**---------------------
** Boundary conditions
**---------------------
**
*BOUNDARY, OP = NEW
PLETs,1,6
SEABED_REF_NODE, 1, 6
SEABED_NO_FRICTION_REF_NODE, 1, 6
INSTALL_SURFACE_REF_NODE, 1, 6
START_NODE, 2, 2
START_NODE, 4, 4
END_NODE, 1, 2
END_NODE, 4, 4
STEEL_NODES2, 4,4
**
nset_gap, 1, 2
nset_gap, 4, 6
nset_gnd, 1, 2
nset_gnd, 4, 6
**
*BOUNDARY, OP=NEW, TYPE=VELOCITY
nset_gnd, 3, 3, -4.0
**
**---------------------
** Loadings
**---------------------
**
*DLOAD, OP = NEW
*INCLUDE, INPUT = "PRESS_STEEL_INT_Install.prof"
*INCLUDE, INPUT = "PRESS_STEEL_EXT_External-Pressure.prof"
*INCLUDE, INPUT = "WEIGHT_Content_Install.prof"
SEC1_STEEL_ELEMENTS, PZ, -<s1_equiv_steel_weight>
*INCLUDE, INPUT="Anti-slip_force.prof"
**
*CLOAD , OP = NEW, FOLLOWER
START_NODE,1,-<T_LAY1>
**
**TEMPERATURE, OP = NEW
**INCLUDE, INPUT = "TEMP_STEEL_landing_Temp.prof"
**
*INCLUDE, INPUT = BPTiber_With_BM_FL6_TestBase_10_Outputs_NBINT_2.inp
**
*END STEP
**
**=================================================================================
**    STEP 004: Install 4/9 - Release Pipe Lateral Constraint
**=================================================================================
**
*STEP , NLGEOM = YES, UNSYMM = YES , INC = 1000, NAME = "Step 004 - Install 4/5 - Release Pipe Lateral Constraint"
Install 4/9 - Release Pipe Lateral Constrain
**
*STATIC, STABILIZE = 1.0e-8
0.05, 1.0, 1.0e-10, 0.1
**
**---------------------
** Model changes
**---------------------
**
*CHANGE FRICTION, INTERACTION=CONTACT_PIPE_SEABED_NO_FRICTION
*friction,ANISOTROPIC
0.02, 10
*MODEL CHANGE, REMOVE, TYPE=ELEMENT
elset_gap
elset_gnd
elset_latSprings
**
**---------------------
** Boundary conditions
**---------------------
**
**
**
**---------------------
** Loadings
**---------------------
**
*DLOAD, OP = NEW
*INCLUDE, INPUT = "PRESS_STEEL_INT_Install.prof"
*INCLUDE, INPUT = "PRESS_STEEL_EXT_External-Pressure.prof"
*INCLUDE, INPUT = "WEIGHT_Content_Install.prof"
SEC1_STEEL_ELEMENTS, PZ, -<s1_equiv_steel_weight>
*INCLUDE, INPUT="Anti-slip_force.prof"
**
*CLOAD , OP = NEW, FOLLOWER
START_NODE,1,-<T_LAY1>
**
**
*INCLUDE, INPUT = BPTiber_With_BM_FL6_TestBase_10_Outputs_NBINT_2.inp
**
*END STEP
**
**=================================================================================
**    STEP 005: Install 5/9 - Lift Sleepers and BM
**=================================================================================
**
*STEP , NLGEOM = YES, UNSYMM = YES , INC = 1000, NAME = "Step 005 - Install 5/5 - Lift Sleepers and BM"
Install 5/9 - Lift Sleepers and BM
**
*STATIC, STABILIZE = 1.0e-8
0.05, 1.0, 1.0e-10, 0.1
**
**---------------------
** Model changes
**---------------------
**
*MODEL CHANGE, ADD, TYPE = CONTACT PAIR
PL_BUOY_Mids,SEABED_SURFACE
PL_BUOY_Ends,SEABED_SURFACE
**
**---------------------
** Boundary conditions
**---------------------
**
*BOUNDARY, OP = NEW,FIXED
PLETs,1,6
SEABED_REF_NODE, 1, 6
SEABED_NO_FRICTION_REF_NODE, 1, 6
INSTALL_SURFACE_REF_NODE, 1, 6
START_NODE, 2, 2
START_NODE, 4, 6
END_NODE,1, 2
END_NODE, 4, 6
STEEL_NODES2, 4,4
**
nset_gap, 1, 6
nset_gnd, 1, 6
**
**---------------------
** Loadings
**---------------------
**
*DLOAD, OP = NEW
*INCLUDE, INPUT = "PRESS_STEEL_INT_Install.prof"
*INCLUDE, INPUT = "PRESS_STEEL_EXT_External-Pressure.prof"
*INCLUDE, INPUT = "WEIGHT_Content_Install.prof"
SEC1_STEEL_ELEMENTS, PZ, -<s1_equiv_steel_weight>
*INCLUDE, INPUT="Anti-slip_force.prof"
Buoy_Sec_Ele, PZ, <UPLIFT_BUOY>
**
**
**
*INCLUDE, INPUT = BPTiber_With_BM_FL6_TestBase_10_Outputs_NBINT_2.inp
**
*END STEP
**
**=================================================================================
**     STEP 006: Install 6/9 - Aslaid
**=================================================================================
**
*STEP , NLGEOM = YES, UNSYMM = YES , INC = 1000, NAME = "Step 005 - Install 6/7 - Aslaid"
Install 6/9 - AslaidIniatiation Rig Active
**
*STATIC, STABILIZE = 1.0e-8
0.05, 1.0, 1.0e-10, 0.1
**
**---------------------
** Model changes
**---------------------
**
**
**---------------------
** Boundary conditions
**---------------------
**
*BOUNDARY, OP = NEW,FIXED
PLETs,1,6
SEABED_REF_NODE, 1, 6
SEABED_NO_FRICTION_REF_NODE, 1, 6
INSTALL_SURFACE_REF_NODE, 1, 6
START_NODE, 2, 2
START_NODE, 4, 6
END_NODE, 2, 2
END_NODE, 4, 6
**
nset_gap, 1, 6
nset_gnd, 1, 6
**
*BOUNDARY, OP=NEW, TYPE=VELOCITY
START_NODE, 3, 3, <struct1_height>
END_NODE, 3, 3, <struct2_height>
**
**---------------------
** Loadings
**---------------------
**
*DLOAD, OP = NEW
*INCLUDE, INPUT = "PRESS_STEEL_INT_Install.prof"
*INCLUDE, INPUT = "PRESS_STEEL_EXT_External-Pressure.prof"
*INCLUDE, INPUT = "WEIGHT_Content_Install.prof"
SEC1_STEEL_ELEMENTS, PZ, -<s1_equiv_steel_weight>
***INCLUDE, INPUT="Anti-slip_force.prof"
***added by WEI
Buoy_Sec_Ele, PZ, <UPLIFT_BUOY>
**
**
*CLOAD , OP = NEW, FOLLOWER
*INCLUDE, INPUT=BPTiber_With_BM_FL6_TestBase_05_TensionAdj.txt
**START_NODE,1,-<T_LAY1>
**END_NODE,  1, <T_LAY2>
**
*INCLUDE, INPUT = BPTiber_With_BM_FL6_TestBase_10_Outputs_NBINT_2.inp
**
*END STEP
**
**=================================================================================
**     STEP 007: Install 7/9 - Aslaid-Activate Friction and Remove Lay Tension--Mudmat resistance applied as spring
**=================================================================================
**
*STEP , NLGEOM = YES, UNSYMM = YES , INC = 1000, NAME = "Step 007 - Install 7/9 - Aslaid-Activate Friction and Remove Lay Tension"
Install 7/9 - Aslaid-Activate Frictin and Remove Lay Tension
**
*STATIC, STABILIZE = 1.0e-7
0.01, 1.0, 1.0e-10, 0.1
*CONTROLS , ANALYSIS=DISCONTINUOUS
*controls,parameters=time incrementation
8,8,9,,,8,6,30,6,3
0.33,0.5,0.75,0.85,0.33,0.33,1.5,0.75
0.8,1.5,1.25,2.0,1.0,0.1,1.0,0.95
*Controls, parameters=field, field=rotation
,, , , , , , 1e-07
**
**---------------------
** Model changes
**---------------------
**
*MODEL CHANGE, REMOVE, TYPE = CONTACT PAIR
PIPE_SURFACE , SEABED_NO_FRICTION_SURFACE
*MODEL CHANGE, ADD, TYPE = CONTACT PAIR
PIPE_SURFACE , SEABED_SURFACE
*MODEL CHANGE, ADD, TYPE=ELEMENT
SPR_DC3PLET6BMudMat, SPR_PLET6AMudMat
**
**---------------------
** Boundary conditions
**---------------------
**
*BOUNDARY, OP = NEW, FIXED
PLETs,1,6
SEABED_REF_NODE, 1, 6
SEABED_NO_FRICTION_REF_NODE, 1, 6
INSTALL_SURFACE_REF_NODE, 1, 6
START_NODE, 2, 3
START_NODE, 4, 6
END_NODE, 2, 3
END_NODE, 4, 6
**
nset_gap, 1, 6
nset_gnd, 1, 6
**
**
**---------------------
** Loadings
**---------------------
**
*DLOAD, OP = NEW
*INCLUDE, INPUT = "PRESS_STEEL_INT_Install.prof"
*INCLUDE, INPUT = "PRESS_STEEL_EXT_External-Pressure.prof"
*INCLUDE, INPUT = "WEIGHT_Content_Install.prof"
SEC1_STEEL_ELEMENTS, PZ, -<s1_equiv_steel_weight>
**INCLUDE, INPUT="Anti-slip_force.prof"
***added by WEI
Buoy_Sec_Ele, PZ, <UPLIFT_BUOY>
**
**
*CLOAD , OP = NEW, FOLLOWER
START_NODE,1,-0
END_NODE,  1, 0
**
**
*INCLUDE, INPUT = BPTiber_With_BM_FL6_TestBase_10_Outputs_NBINT_2.inp
**
*END STEP
**
**=================================================================================
**     STEP 007: Install 8/9 - As laid (Temp drop to Ambient Temp) PLET movement--PLET with ONLY Mudmat Sliding Resistance allow PLET movement
**=================================================================================
**
*STEP , NLGEOM = YES, UNSYMM = YES , INC = 1000, NAME = "Step 008 - Install 8/9 - Aslaid-ambient"
Install 8/9 - Aslaid-Drop to Ambient
**
*STATIC, STABILIZE = 1.0e-8
0.05, 1.0, 1.0e-10, 0.1
**
**---------------------
** Model changes
**---------------------
**
**
**---------------------
** Boundary conditions
**---------------------
**
**
**
**---------------------
** Loadings
**---------------------
**
**
**
****---------- Temperature drops from Sea Surface to Seabed (ambient) temperature
***
*temperature
PIPE_NODES,4.2
**
*INCLUDE, INPUT = BPTiber_With_BM_FL6_TestBase_10_Outputs_NBINT_2.inp
**
*END STEP
**
**=================================================================================
**     STEP 009: Install 9/9 - As laid (Ambient Temp) With PIN -- Locked PIN Spring with infinite Resitance Replaces Mudmat
**=================================================================================
**
*STEP , NLGEOM = YES, UNSYMM = YES , INC = 1000, NAME = "Step 009 - Install 9/9 - AsLaid Empty Ambient with PIN"
Install 9/9 - AsLaid Empty Ambient with PIN
**
*STATIC, STABILIZE = 1.0e-7
0.01, 1.0, 1.0e-10, 0.1
*CONTROLS , RESET
*CONTROLS , ANALYSIS=DISCONTINUOUS
*controls,parameters=time incrementation
8,8,9,,,8,6,30,6,3
0.33,0.5,0.75,0.85,0.33,0.33,1.5,0.75
0.8,1.5,1.25,2.0,1.0,0.1,1.0,0.95
*Controls, parameters=field, field=displacement
,0.02, , , , , , 1e-07
*Controls, parameters=field, field=rotation
,0.02, , , , , , 1e-07
**
**---------------------
** Model changes
**---------------------
**
*MODEL CHANGE, REMOVE, TYPE=ELEMENT
SPR_DC3PLET6BMudMat, SPR_PLET6AMudMat
***
*MODEL CHANGE, ADD, TYPE=ELEMENT
SPR_DC3PLET6BPIN,SPR_PLET6APIN
**
**---------------------
** Boundary conditions
**---------------------
**
**
**
**---------------------
** Loadings
**---------------------
**
**
**
****---------- Temperature drops from Sea Surface to Seabed (ambient) temperature
***
**
*INCLUDE, INPUT = BPTiber_With_BM_FL6_TestBase_10_Outputs_NBINT_2.inp
**
*END STEP
**
**=================================================================================
**     STEP 010: Flooded WetPark ----------- Sliding Rail PIN is in Locked Position during FLooding
**=================================================================================
**
*STEP , NLGEOM = YES, UNSYMM = YES , INC = 1000, NAME = "Step 010 - Flooded WetPark w PIN"
Flooded WetPark w PIN
**
*STATIC, STABILIZE = 1.0e-8
0.05, 1.0, 1.0e-10, 0.1
**
**---------------------
** Model changes
**---------------------
**
**
**---------------------
** Boundary conditions
**---------------------
**
**
**
**---------------------
** Loadings
**---------------------
**
*DLOAD, OP = NEW
*INCLUDE, INPUT = "PRESS_STEEL_INT_Flooded.prof"
*INCLUDE, INPUT = "PRESS_STEEL_EXT_External-Pressure.prof"
*INCLUDE, INPUT = "WEIGHT_Content_flooded.prof"
SEC1_STEEL_ELEMENTS, PZ, -<s1_equiv_steel_weight>
***added by WEI
Buoy_Sec_Ele, PZ, <UPLIFT_BUOY>
PL_BUOY_BM1, P2,-10
PL_BUOY_BM2, P2,-10
PL_BUOY_BM3, P2,-10
PL_BUOY_BM4, P2,10
PL_BUOY_BM5, P2,10
PL_BUOY_BM6, P2,10
PL_BUOY_BM7, P2,10
PL_BUOY_BM8, P2,-10
PL_BUOY_BM7-1, P2,10
**PL_BUOY_BM7-1, P2,10
***
*TEMPERATURE, OP = NEW
*INCLUDE, INPUT = "TEMP_STEEL_Flooded_Temp.prof"
**
*INCLUDE, INPUT = BPTiber_With_BM_FL6_TestBase_10_Outputs_NBINT_2.inp
**
*END STEP
**
**=================================================================================
**     STEP 011: Leak Test WetPark ----------- Sliding Rail PIN is in Locked Position during Hydrotest
**=================================================================================
**
*STEP , NLGEOM = YES, UNSYMM = YES , INC = 1000, NAME = "Step 011 - LeakTest WetPark w PIN"
LeakTest WetPark w PIN
**
*STATIC, STABILIZE = 1.0e-8
0.05, 1.0, 1.0e-10, 0.1
**
**---------------------
** Model changes
**---------------------
**
**
**---------------------
** Boundary conditions
**---------------------
**
**
**
**---------------------
** Loadings
**---------------------
**
*DLOAD, OP = NEW
*INCLUDE, INPUT = "PRESS_STEEL_INT_Leaktest.prof"
*INCLUDE, INPUT = "PRESS_STEEL_EXT_External-Pressure.prof"
*INCLUDE, INPUT = "WEIGHT_Content_flooded.prof"
SEC1_STEEL_ELEMENTS, PZ, -<s1_equiv_steel_weight>
***added by WEI
Buoy_Sec_Ele, PZ, <UPLIFT_BUOY>
PL_BUOY_BM1, P2,-10
PL_BUOY_BM2, P2,-10
PL_BUOY_BM3, P2,-10
PL_BUOY_BM4, P2,10
PL_BUOY_BM5, P2,10
PL_BUOY_BM6, P2,10
PL_BUOY_BM7, P2,10
PL_BUOY_BM8, P2,-10
PL_BUOY_BM7-1, P2,10
**PL_BUOY_BM7-1, P2,10
***
*TEMPERATURE, OP = NEW
*INCLUDE, INPUT = "TEMP_STEEL_Flooded_Temp.prof"
**
*INCLUDE, INPUT = BPTiber_With_BM_FL6_TestBase_10_Outputs_NBINT_2.inp
**
*END STEP
**
**=================================================================================
**     STEP 012: Depressure ----------- DEPRESSURE with PIN
**=================================================================================
**
*STEP , NLGEOM = YES, UNSYMM = YES , INC = 1000, NAME = "Step 012 - DEPRESSURE with PIN"
DEPRESSURE with PIN
**
*STATIC, STABILIZE = 1.0e-8
0.05, 1.0, 1.0e-10, 0.1
*controls,parameters=time incrementation
8,,,,,8,6,30,6,3
0.33,0.5,0.75,0.85,0.33,0.33,1.5,0.75
0.8,1.5,1.25,2.0,1.0,0.1,1.0,0.95
*Controls, parameters=field, field=displacement
,0.02, , , , , , 1e-07
*Controls, parameters=field, field=rotation
,0.02, , , , , , 1e-07
**
**---------------------
** Model changes
**---------------------
**
**
**---------------------
** Boundary conditions
**---------------------
**
**
**
**---------------------
** Loadings
**---------------------
**
*DLOAD, OP = NEW
*INCLUDE, INPUT = "PRESS_STEEL_INT_Flooded.prof"
*INCLUDE, INPUT = "PRESS_STEEL_EXT_External-Pressure.prof"
*INCLUDE, INPUT = "WEIGHT_Content_flooded.prof"
SEC1_STEEL_ELEMENTS, PZ, -<s1_equiv_steel_weight>
***added by WEI
Buoy_Sec_Ele, PZ, <UPLIFT_BUOY>
PL_BUOY_BM1, P2,-10
PL_BUOY_BM2, P2,-10
PL_BUOY_BM3, P2,-10
PL_BUOY_BM4, P2,10
PL_BUOY_BM5, P2,10
PL_BUOY_BM6, P2,10
PL_BUOY_BM7, P2,10
PL_BUOY_BM8, P2,-10
PL_BUOY_BM7-1, P2,10
**PL_BUOY_BM7-1, P2,10
***
*TEMPERATURE, OP = NEW
*INCLUDE, INPUT = "TEMP_STEEL_Flooded_Temp.prof"
**
*INCLUDE, INPUT = BPTiber_With_BM_FL6_TestBase_10_Outputs_NBINT_2.inp
**
*END STEP
**
**=================================================================================
**     STEP 013: Depressure ---PLET Pin Removal Flooded  ----------- Sliding Rail PIN is removed After Depressurize-- Now PIN PILE springs and Conneting Elemenst are activated.
**=================================================================================
**
*STEP , NLGEOM = YES, UNSYMM = YES , INC = 1000, NAME = "Step 013 - PLET Pin Removal"
PLET Pin Removal-Post LeakTest- Jumper Installed
**
*STATIC, STABILIZE = 1.0e-8
0.05, 1.0, 1.0e-10, 0.1
**
**---------------------
** Model changes
**---------------------
**
*** PLET PIN is removed and Both PLET Pile  Spings are activated
***
*MODEL CHANGE, TYPE=ELEMENT, REMOVE
SPR_DC3PLET6BPIN,SPR_PLET6APIN
***
*MODEL CHANGE, TYPE=ELEMENT, ADD
SPR_DC3PLET6B,SPR_PLET6A,STRUCT1_DC3PLET6B,STRUCT2_PLET6A
**
**
**---------------------
** Boundary conditions
**---------------------
**
**
**
**---------------------
** Loadings
**---------------------
**
**
**
*INCLUDE, INPUT = BPTiber_With_BM_FL6_TestBase_10_Outputs_NBINT_2.inp
**
*END STEP
**
**=================================================================================
**     STEP 014: Hydrotest WetPark----PIN Removed
**=================================================================================
**
*STEP , NLGEOM = YES, UNSYMM = YES , INC = 1000, NAME = "Step 014 - Hydrotest WetPark"
Hydrotest WetPark
**
*STATIC, STABILIZE = 1.0e-7
0.01, 1.0, 1.0e-10, 0.1
*controls,parameters=time incrementation
8,8,9,,,8,6,30,6,3
0.33,0.5,0.75,0.85,0.33,0.33,1.5,0.75
0.8,1.5,1.25,2.0,1.0,0.1,1.0,0.95
*Controls, parameters=field, field=rotation
,, , , , , , 2e-07
**
**---------------------
** Model changes
**---------------------
**
**
**
**---------------------
** Boundary conditions
**---------------------
**
**
**
**---------------------
** Loadings
**---------------------
**
*DLOAD, OP = NEW
*INCLUDE, INPUT = "PRESS_STEEL_INT_Hydrotest.prof"
*INCLUDE, INPUT = "PRESS_STEEL_EXT_External-Pressure.prof"
*INCLUDE, INPUT = "WEIGHT_Content_flooded.prof"
SEC1_STEEL_ELEMENTS, PZ, -<s1_equiv_steel_weight>
***added by WEI
Buoy_Sec_Ele, PZ, <UPLIFT_BUOY>
PL_BUOY_BM1, P2,-10
PL_BUOY_BM2, P2,-10
PL_BUOY_BM3, P2,-10
PL_BUOY_BM4, P2,10
PL_BUOY_BM5, P2,10
PL_BUOY_BM6, P2,10
PL_BUOY_BM7, P2,10
PL_BUOY_BM8, P2,-10
PL_BUOY_BM7-1, P2,10
**PL_BUOY_BM7-1, P2,10
***
*TEMPERATURE, OP = NEW
*INCLUDE, INPUT = "TEMP_STEEL_Flooded_Temp.prof"
**
**
**
*INCLUDE, INPUT = BPTiber_With_BM_FL6_TestBase_10_Outputs_NBINT_2.inp
**
*END STEP
**
**=================================================================================
**     STEP 015: Depressure ----PIN Removed
**=================================================================================
**
*STEP , NLGEOM = YES, UNSYMM = YES , INC = 1000, NAME = "Step 015 - Depressure"
Depressure
**
*STATIC, STABILIZE = 1.0e-8
0.05, 1.0, 1.0e-10, 0.1
**
**---------------------
** Model changes
**---------------------
**
**
**
**---------------------
** Boundary conditions
**---------------------
**
**
**
**---------------------
** Loadings
**---------------------
**
*DLOAD, OP = NEW
*INCLUDE, INPUT = "PRESS_STEEL_INT_Flooded.prof"
*INCLUDE, INPUT = "PRESS_STEEL_EXT_External-Pressure.prof"
*INCLUDE, INPUT = "WEIGHT_Content_flooded.prof"
SEC1_STEEL_ELEMENTS, PZ, -<s1_equiv_steel_weight>
***added by WEI
Buoy_Sec_Ele, PZ, <UPLIFT_BUOY>
PL_BUOY_BM1, P2,-10
PL_BUOY_BM2, P2,-10
PL_BUOY_BM3, P2,-10
PL_BUOY_BM4, P2,10
PL_BUOY_BM5, P2,10
PL_BUOY_BM6, P2,10
PL_BUOY_BM7, P2,10
PL_BUOY_BM8, P2,-10
PL_BUOY_BM7-1, P2,10
**PL_BUOY_BM7-1, P2,10
***
*TEMPERATURE, OP = NEW
*INCLUDE, INPUT = "TEMP_STEEL_Flooded_Temp.prof"
**
**
**
*INCLUDE, INPUT = BPTiber_With_BM_FL6_TestBase_10_Outputs_NBINT_2.inp
**
*END STEP
**
**=================================================================================
**     STEP 016: Re-Hydrotest
**=================================================================================
**
*STEP , NLGEOM = YES, UNSYMM = YES , INC = 1000, NAME = "Step 016 - Re-hydrotest"
Re-hydrotest
**
*STATIC, STABILIZE = 1.0e-8
0.05, 1.0, 1.0e-10, 0.1
**
**---------------------
** Model changes
**---------------------
**
**
**
**---------------------
** Boundary conditions
**---------------------
**
**
**
**---------------------
** Loadings
**---------------------
**
*DLOAD, OP = NEW
*INCLUDE, INPUT = "PRESS_STEEL_INT_Hydrotest.prof"
*INCLUDE, INPUT = "PRESS_STEEL_EXT_External-Pressure.prof"
*INCLUDE, INPUT = "WEIGHT_Content_flooded.prof"
SEC1_STEEL_ELEMENTS, PZ, -<s1_equiv_steel_weight>
***added by WEI
Buoy_Sec_Ele, PZ, <UPLIFT_BUOY>
PL_BUOY_BM1, P2,-10
PL_BUOY_BM2, P2,-10
PL_BUOY_BM3, P2,-10
PL_BUOY_BM4, P2,10
PL_BUOY_BM5, P2,10
PL_BUOY_BM6, P2,10
PL_BUOY_BM7, P2,10
PL_BUOY_BM8, P2,-10
PL_BUOY_BM7-1, P2,10
**PL_BUOY_BM7-1, P2,10
***
*TEMPERATURE, OP = NEW
*INCLUDE, INPUT = "TEMP_STEEL_Flooded_Temp.prof"
**
**
**
*INCLUDE, INPUT = BPTiber_With_BM_FL6_TestBase_10_Outputs_NBINT_2.inp
**
*END STEP
**
**=================================================================================
**     STEP 017: Re-Depressure
**=================================================================================
**
*STEP , NLGEOM = YES, UNSYMM = YES , INC = 1000, NAME = "Step 017 - Re-Depressure"
Re-Depressure
**
*STATIC, STABILIZE = 1.0e-8
0.05, 1.0, 1.0e-10, 0.1
**
**---------------------
** Model changes
**---------------------
**
**
**
**---------------------
** Boundary conditions
**---------------------
**
**
**
**---------------------
** Loadings
**---------------------
**
*DLOAD, OP = NEW
*INCLUDE, INPUT = "PRESS_STEEL_INT_Flooded.prof"
*INCLUDE, INPUT = "PRESS_STEEL_EXT_External-Pressure.prof"
*INCLUDE, INPUT = "WEIGHT_Content_flooded.prof"
SEC1_STEEL_ELEMENTS, PZ, -<s1_equiv_steel_weight>
***added by WEI
Buoy_Sec_Ele, PZ, <UPLIFT_BUOY>
PL_BUOY_BM1, P2,-10
PL_BUOY_BM2, P2,-10
PL_BUOY_BM3, P2,-10
PL_BUOY_BM4, P2,10
PL_BUOY_BM5, P2,10
PL_BUOY_BM6, P2,10
PL_BUOY_BM7, P2,10
PL_BUOY_BM8, P2,-10
PL_BUOY_BM7-1, P2,10
**PL_BUOY_BM7-1, P2,10
***
*TEMPERATURE, OP = NEW
*INCLUDE, INPUT = "TEMP_STEEL_Flooded_Temp.prof"
**
**
**
*INCLUDE, INPUT = BPTiber_With_BM_FL6_TestBase_10_Outputs_NBINT_2.inp
**
*END STEP
**
**=================================================================================
**     STEP 018: Fill -Content
**=================================================================================
**
*STEP , NLGEOM = YES, UNSYMM = YES , INC = 1000, NAME = "Step 018 - Fill-Content"
Fill-Content
**
*STATIC, STABILIZE = 1.0e-8
0.05, 1.0, 1.0e-10, 0.1
**
**---------------------
** Model changes
**---------------------
**
**
**
**---------------------
** Boundary conditions
**---------------------
**
**
**
**---------------------
** Loadings
**---------------------
**
*DLOAD, OP = NEW
*INCLUDE, INPUT = "PRESS_STEEL_INT_FillContent.prof"
*INCLUDE, INPUT = "PRESS_STEEL_EXT_External-Pressure.prof"
*INCLUDE, INPUT = "WEIGHT_Content_early.prof"
SEC1_STEEL_ELEMENTS, PZ, -<s1_equiv_steel_weight>
***added by WEI
Buoy_Sec_Ele, PZ, <UPLIFT_BUOY>
PL_BUOY_BM1, P2,-10
PL_BUOY_BM2, P2,-10
PL_BUOY_BM3, P2,-10
PL_BUOY_BM4, P2,10
PL_BUOY_BM5, P2,10
PL_BUOY_BM6, P2,10
PL_BUOY_BM7, P2,10
PL_BUOY_BM8, P2,-10
PL_BUOY_BM7-1, P2,10
**PL_BUOY_BM7-1, P2,10
***
*TEMPERATURE, OP = NEW
*INCLUDE, INPUT = "TEMP_STEEL_FillContent_Temp.prof"
**
**
**
*INCLUDE, INPUT = BPTiber_With_BM_FL6_TestBase_10_Outputs_NBINT_2.inp
**
*END STEP
**
**=================================================================================
**     STEP 019: First-Operation Cycle
**=================================================================================
**
*STEP , NLGEOM = YES, UNSYMM = YES , INC = 1000, NAME = "Step 019 - 1st Operation Cycle"
1st Operation Cycle
**
*STATIC, STABILIZE = 1.0e-8
0.05, 1.0, 1.0e-10, 0.1
**
**---------------------
** Model changes
**---------------------
**
**
**
**---------------------
** Boundary conditions
**---------------------
**
**
**
**---------------------
** Loadings
**---------------------
**
*DLOAD, OP = NEW
*INCLUDE, INPUT = "PRESS_STEEL_INT_OPSS_Early.prof"
*INCLUDE, INPUT = "PRESS_STEEL_EXT_External-Pressure.prof"
*INCLUDE, INPUT = "WEIGHT_Content_early.prof"
SEC1_STEEL_ELEMENTS, PZ, -<s1_equiv_steel_weight>
***added by WEI
Buoy_Sec_Ele, PZ, <UPLIFT_BUOY>
***
*TEMPERATURE, OP = NEW
*INCLUDE, INPUT = "TEMP_STEEL_OPSS_Early_Temp.prof"
**
**
**
*INCLUDE, INPUT = BPTiber_With_BM_FL6_TestBase_10_Outputs_NBINT_2.inp
**
*END STEP
**
**=================================================================================
**     STEP 020: FCD-1st operation cycle
**=================================================================================
**
*STEP , NLGEOM = YES, UNSYMM = YES , INC = 1000, NAME = "Step 020 - 1st Operation Cycle-FCD"
1st Operation Cycle-FCD
**
*STATIC, STABILIZE = 1.0e-8
0.05, 1.0, 1.0e-10, 0.1
**
**---------------------
** Model changes
**---------------------
**
**
**
**---------------------
** Boundary conditions
**---------------------
**
**
**
**---------------------
** Loadings
**---------------------
**
*DLOAD, OP = NEW
*INCLUDE, INPUT = "PRESS_STEEL_INT_FCD_Early.prof"
*INCLUDE, INPUT = "PRESS_STEEL_EXT_External-Pressure.prof"
*INCLUDE, INPUT = "WEIGHT_Content_early.prof"
SEC1_STEEL_ELEMENTS, PZ, -<s1_equiv_steel_weight>
***added by WEI
Buoy_Sec_Ele, PZ, <UPLIFT_BUOY>
***
*TEMPERATURE, OP = NEW
*INCLUDE, INPUT = "TEMP_STEEL_FCD_Early_Temp.prof"
**
**
**
*INCLUDE, INPUT = BPTiber_With_BM_FL6_TestBase_10_Outputs_NBINT_2.inp
**
*END STEP
**
**=================================================================================
**     STEP 021: Fill -Design Content
**=================================================================================
**
*STEP , NLGEOM = YES, UNSYMM = YES , INC = 1000, NAME = "Step 021 - Design Content"
Design Content
**
*STATIC, STABILIZE = 1.0e-8
0.05, 1.0, 1.0e-10, 0.1
**
**---------------------
** Model changes
**---------------------
**
**
**
**---------------------
** Boundary conditions
**---------------------
**
**
**
**---------------------
** Loadings
**---------------------
**
*DLOAD, OP = NEW
*INCLUDE, INPUT = "PRESS_STEEL_INT_FillContent.prof"
*INCLUDE, INPUT = "PRESS_STEEL_EXT_External-Pressure.prof"
*INCLUDE, INPUT = "WEIGHT_Content_design.prof"
SEC1_STEEL_ELEMENTS, PZ, -<s1_equiv_steel_weight>
***added by WEI
Buoy_Sec_Ele, PZ, <UPLIFT_BUOY>
***
*TEMPERATURE, OP = NEW
*INCLUDE, INPUT = "TEMP_STEEL_FillContent_Temp.prof"
**
**
**
*INCLUDE, INPUT = BPTiber_With_BM_FL6_TestBase_10_Outputs_NBINT_2.inp
**
*END STEP
**
**=================================================================================
**     STEP 022: Design
**=================================================================================
**
*STEP , NLGEOM = YES, UNSYMM = YES , INC = 2000, NAME = "Step 022 - Design"
Design
**
*STATIC, STABILIZE = 1.0e-7
0.01, 1.0, 1.0e-10, 0.1
*controls,parameters=time incrementation
12,8,9,,,12,6,30,6,3
0.33,0.5,0.75,0.85,0.33,0.33,1.5,0.75
0.8,1.5,1.25,2.0,1.0,0.1,1.0,0.95
*Controls, parameters=field, field=rotation
,, , , , , , 2e-07
**
**---------------------
** Model changes
**---------------------
**
**
**
**---------------------
** Boundary conditions
**---------------------
**
**
**
**---------------------
** Loadings
**---------------------
**
*DLOAD, OP = NEW
*INCLUDE, INPUT = "PRESS_STEEL_INT_Design.prof"
*INCLUDE, INPUT = "PRESS_STEEL_EXT_External-Pressure.prof"
*INCLUDE, INPUT = "WEIGHT_Content_design.prof"
SEC1_STEEL_ELEMENTS, PZ, -<s1_equiv_steel_weight>
***added by WEI
Buoy_Sec_Ele, PZ, <UPLIFT_BUOY>
***
*TEMPERATURE, OP = NEW
*INCLUDE, INPUT = "TEMP_STEEL_Design_Temp_Profile.prof"
**
**
**
*INCLUDE, INPUT = BPTiber_With_BM_FL6_TestBase_10_Outputs_NBINT_2.inp
**
*END STEP
**
**=================================================================================
**     STEP 023: FCD after Design
**=================================================================================
**
*STEP , NLGEOM = YES, UNSYMM = YES , INC = 1000, NAME = "Step 023 - FCD after Design"
FCD after Design
**
*STATIC, STABILIZE = 1.0e-8
0.05, 1.0, 1.0e-10, 0.1
**
**---------------------
** Model changes
**---------------------
**
**
**
**---------------------
** Boundary conditions
**---------------------
**
**
**
**---------------------
** Loadings
**---------------------
**
*DLOAD, OP = NEW
*INCLUDE, INPUT = "PRESS_STEEL_INT_FillContent.prof"
*INCLUDE, INPUT = "PRESS_STEEL_EXT_External-Pressure.prof"
*INCLUDE, INPUT = "WEIGHT_Content_design.prof"
SEC1_STEEL_ELEMENTS, PZ, -<s1_equiv_steel_weight>
***added by WEI
Buoy_Sec_Ele, PZ, <UPLIFT_BUOY>
***
*TEMPERATURE, OP = NEW
*INCLUDE, INPUT = "TEMP_STEEL_FillContent_Temp.prof"
**
**
**
*INCLUDE, INPUT = BPTiber_With_BM_FL6_TestBase_10_Outputs_NBINT_2.inp
**
*END STEP
**
