**
** File generated by the general flowline pre-process v2.00
** Generated by: Wei Qiao
** Generated at: 8/5/2026 12:14:32 PM
** Model name: BPTiber_With_BM_FL6_TestBase
******Wei 7-24-2026*********************************
*NODE,NSET=STRUCT1_DC3PLET6B
7000001,-91.4719313570888,40.4089813507349,-1205.246064
*NODE,NSET=STRUCT2_PLET6A
7015960,10105.3815969856,-6328.17696607257,-1263.862152
*NSET,NSET=PLETs
STRUCT1_DC3PLET6B,STRUCT2_PLET6A
*****************************************************
*ELEMENT,TYPE=SPRINGA,ELSET=SPR_DC3PLET6B
7000001, 1,	7000001
***
***  DC3 Exp 2 X Cont 2
*****
*SPRING,ELSET=SPR_DC3PLET6B,NONLINEAR

*****
-2209978.5	,	-0.7381
-1967006.0	,	-0.7149
-1600056.5	,	-0.6879
-1123340.9	,	-0.6608
-538948.3	,	-0.6336
-230981.1	,	-0.6200
-76994.1	,	-0.6132
-1.0	,	-0.6098
0.0	,	0.0000
1.0	,	0.6098
76994.1	,	0.6132
230981.1	,	0.6200
538948.3	,	0.6336
1123340.9	,	0.6608
1600056.5	,	0.6879
1967006.0	,	0.7149
2209978.5	,	0.7381
**
*ELEMENT,TYPE=SPRINGA,ELSET=SPR_PLET6A
7015960, 15960,	7015960
***
***  DC3 Exp 2 X Cont 2
*****
*SPRING,ELSET=SPR_PLET6A,NONLINEAR

*****
-2153634.6	,	-0.8278
-1786877.0	,	-0.7436
-1253643.0	,	-0.6858
-883626.0	,	-0.6596
-426110.8	,	-0.6330
-182679.2	,	-0.6197
-60893.4	,	-0.6131
-1.0	,	-0.6098
0.0	,	0.0000
1.0	,	0.6098
60893.4	,	0.6131
182679.2	,	0.6197
426110.8	,	0.6330
883626.0	,	0.6596
1253643.0	,	0.6858
1786877.0	,	0.7436
2153634.6	,	0.8278
**
** Structure #1
**
*ELEMENT, TYPE=CONN3D2, ELSET = STRUCT1_DC3PLET6B
7000002 ,1
**
*ORIENTATION, NAME = CSYS_STRUCT1
<struct1_csX_X>, <struct1_csX_Y>, <struct1_csX_Z>, <struct1_csY_X>, <struct1_csY_Y>, <struct1_csY_Z>
**
*CONNECTOR SECTION, ELSET = STRUCT1_DC3PLET6B, BEHAVIOR = STRUCT1_BEHAVIOR
CARTESIAN
CSYS_STRUCT1
**
*CONNECTOR BEHAVIOR, NAME = STRUCT1_BEHAVIOR
*CONNECTOR ELASTICITY,COMPONENT=1
1000000000
*CONNECTOR PLASTICITY, COMPONENT=1
*CONNECTOR HARDENING, TYPE=ISO, DEFINITION=TABULAR
<R_Sliding1>,	0.02
<R_Sliding1>,   120
**
** Structure #2
**
*ELEMENT, TYPE=CONN3D2, ELSET = STRUCT2_PLET6A
7000003, 15960
**
*ORIENTATION, NAME = CSYS_STRUCT2
<struct2_csX_X>, <struct2_csX_Y>, <struct2_csX_Z>, <struct2_csY_X>, <struct2_csY_Y>, <struct2_csY_Z>
**
*CONNECTOR SECTION, ELSET = STRUCT2_PLET6A, BEHAVIOR = STRUCT2_BEHAVIOR
CARTESIAN
CSYS_STRUCT2
**
*CONNECTOR BEHAVIOR, NAME = STRUCT2_BEHAVIOR
*CONNECTOR ELASTICITY,COMPONENT=1
1000000000
*CONNECTOR PLASTICITY, COMPONENT=1
*CONNECTOR HARDENING, TYPE=ISO, DEFINITION=TABULAR
<R_Sliding2>,	0.02
<R_Sliding2>,   120
**
**
**
**********************************************************
******PLET_Pin
**********************************************************
*ELEMENT,TYPE=SPRINGA,ELSET=SPR_DC3PLET6BPIN
7000004, 1,	7000001
***
***  DC3 Exp 0.0102m X Cont 0.0003
*****
*SPRING,ELSET=SPR_DC3PLET6BPIN,NONLINEAR

*****
-7761557.6	,	-0.1992
-2111120.4	,	-0.1287
-1600056.5	,	-0.0883
-1123340.9	,	-0.0612
-538948.3	,	-0.0340
-230981.1	,	-0.0204
-76994.1	,	-0.0136
-1.0	,	-0.0102
0.0	,	0.0000
1.0	,	0.0003
76994.1	,	0.0037
230981.1	,	0.0105
538948.3	,	0.0241
1123340.9	,	0.0513
1600056.5	,	0.0784
2111120.4	,	0.1188
7761557.6	,	0.1893
**
*ELEMENT,TYPE=SPRINGA,ELSET=SPR_PLET6APIN
7000005, 15960,	7015960
***
***  DC3 Exp 0.0003m X Cont 0.0102m
** Change Exp 0.0102m x Cont 0.0003m
*****
*SPRING,ELSET=SPR_PLET6APIN,NONLINEAR

*****
-6280080.0	,	-0.2103
-1643626.3	,	-0.1251
-1253643.0	,	-0.0863
-883626.0	,	-0.0600
-426110.8	,	-0.0335
-182679.2	,	-0.0202
-60893.4	,	-0.0135
-1.0	,	-0.0102
0.0	,	0.0000
1.0	,	0.0003
60893.4	,	0.0036
182679.2	,	0.0103
426110.8	,	0.0236
883626.0	,	0.0501
1253643.0	,	0.0764
1643626.3	,	0.1153
6280080.0	,	0.2004
****************************************************
**********************************************************
******PLET_MudMatOnly
**********************************************************
*ELEMENT,TYPE=SPRINGA,ELSET=SPR_DC3PLET6BMudMat
7000006, 1,	7000001
***
***  DC3 Cap 220kN=49.5 kips
*****
*SPRING,ELSET=SPR_DC3PLET6BMudMat,NONLINEAR

*****
-675479.3	,	-0.1481
-587778.9	,	-0.0645
-395651.1	,	-0.0381
-255267.4	,	-0.0261
-182347.3	,	-0.0201
-145877.8	,	-0.0171
-109408.4	,	-0.0141
-72938.9	,	-0.0111
-36469.5	,	-0.0081
-1.0	,	-0.0051
0.0	,	0.0000
1.0	,	0.0051
36469.5	,	0.0081
72938.9	,	0.0111
109408.4	,	0.0141
145877.8	,	0.0171
182347.3	,	0.0201
255267.4	,	0.0261
395651.1	,	0.0381
587778.9	,	0.0645
675479.3	,	0.1481
**
*ELEMENT,TYPE=SPRINGA,ELSET=SPR_PLET6AMudMat
7000007, 15960,	7015960
***
***  DC3 Cap 140kN=31.5 kips
*****
*SPRING,ELSET=SPR_PLET6AMudMat,NONLINEAR

*****
-590353.7	,	-0.6051
-589419.7	,	-0.5524
-490276.6	,	-0.0684
-386715.4	,	-0.0467
-191097.5	,	-0.0246
-81922.8	,	-0.0134
-27307.6	,	-0.0079
-1.0	,	-0.0051
0.0	,	0.0000
1.0	,	0.0051
27307.6	,	0.0079
81922.8	,	0.0134
191097.5	,	0.0246
386715.4	,	0.0467
490276.6	,	0.0684
589419.7	,	0.5524
590353.7	,	0.6051
****************************************************
*ELSET,ELSET=PLETS
SPR_DC3PLET6B,SPR_PLET6A,SPR_DC3PLET6BPIN,SPR_PLET6APIN,SPR_DC3PLET6BMudMat,SPR_PLET6AMudMat
**
